*Heading
** Job name: i3-over-all Model name: Model-1
** Generated by: Abaqus/CAE 6.10-1
*Preprint, echo=NO, model=NO, history=NO, contact=NO
**
** PARTS
**
*Part, name=bb-1
*Node
      1, 0.0350000001,         0.25,           0.
      2, 0.0299999993,         0.25,           0.
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*Element, type=C3D8H
  1, 3745, 3760, 3743,    1, 3959, 3974, 3957,   39
  2, 3760,  556,  555, 3743, 3974,  972,  973, 3957
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*Element, type=C3D8R
1601, 3745,    1, 3743, 3760, 5777,  168, 5775, 5792
1602, 3760, 3743,  555,  556, 5792, 5775, 1819, 1820
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*Nset, nset=frame-b
   32,   33,   63,   64,   74,   75
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*Elset, elset=frame-b
 2569, 2570, 2571, 2572, 2573, 2574
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*Nset, nset=rubber-f
    1,    2,    3,    4,    5,    6
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*Elset, elset=rubber-f
    1,    2,    3,    4,    5,    6
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*Nset, nset=frame-f
    1,    2,    3,    4,    5,    6
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*Elset, elset=frame-f, generate
 1601,  2432,     1
*Nset, nset=rubber-bf
   32,   33,   74,   75,  137,  138
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*Elset, elset=rubber-bf
 2433, 2434, 2435, 2436, 2437, 2438
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*Nset, nset=rubber-b
  225,  226,  227,  228,  257,  258
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*Elset, elset=rubber-b
 3281, 3282, 3283, 3284, 3285, 3286
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** Section: Section-4
*Solid Section, elset=rubber-f, material=DE-umat-ff
,
** Section: Section-6
*Solid Section, elset=frame-f, material=sub-ABS
,
** Section: Section-3
*Solid Section, elset=rubber-bf, material=DE-umat-f
,
** Section: Section-1
*Solid Section, elset=frame-b, material=ABS
,
** Section: Section-2
*Solid Section, elset=rubber-b, material=DE-umat-b
,
*End Part
**
*Part, name=rr
*Node
      1, -0.0100134425, 0.0438717566,           0.
      2, -0.019524768, 0.0405436009,           0.
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*Element, type=C3D8R
   1,  135,  130,  129,  191,   29,   24,   23,   85
   2,  130,  135,  136,  107,   24,   29,   30,    1
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*Nset, nset=_PickedSet2, internal, generate
    1,  4346,     1
*Elset, elset=_PickedSet2, internal, generate
    1,  3640,     1
** Section: Section-5
*Solid Section, elset=_PickedSet2, material=rr
,
*End Part
**
**
** ASSEMBLY
**
*Assembly, name=Assembly
**
*Instance, name=bb-1-1, part=bb-1
*End Instance
**
*Instance, name=rr-1, part=rr
      -0.005,        0.005,       -0.211
      -0.005,        0.005,       -0.211,       -1.005,        0.005,       -0.211,          90.
*End Instance
**
*Nset, nset=_PickedSet8, internal, instance=rr-1, generate
   1,  106,    1
*Elset, elset=_PickedSet8, internal, instance=rr-1, generate
  1,  91,   1
*Nset, nset=_PickedSet13, internal, instance=bb-1-1
   69,   72,   76,   92,   93,   94
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*Elset, elset=_PickedSet13, internal, instance=bb-1-1
 1281, 1282, 1283, 1284, 1285, 1286
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*Nset, nset=_PickedSet14, internal, instance=bb-1-1
   70,   71,   77,   78,   79,   80
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*Elset, elset=_PickedSet14, internal, instance=bb-1-1
 1217, 1218, 1219, 1220, 1221, 1222
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*Nset, nset=_PickedSet15, internal, instance=bb-1-1
  205,  206,  207,  213,  215,  216
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*Elset, elset=_PickedSet15, internal, instance=bb-1-1, generate
 3089,  3152,     1
*Nset, nset=_PickedSet16, internal, instance=bb-1-1
  208,  209,  211,  212,  221,  222
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*Elset, elset=_PickedSet16, internal, instance=bb-1-1, generate
 4145,  4208,     1
*Nset, nset=_PickedSet17, internal, instance=bb-1-1
  269,  270,  271,  272,  273,  274
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*Elset, elset=_PickedSet17, internal, instance=bb-1-1, generate
 3281,  3344,     1
*Nset, nset=_PickedSet18, internal, instance=bb-1-1
  277,  278,  279,  280,  281,  282
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*Elset, elset=_PickedSet18, internal, instance=bb-1-1, generate
 3345,  3408,     1
*Nset, nset=_PickedSet19, internal, instance=bb-1-1
  285,  286,  287,  288,  289,  290
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*Elset, elset=_PickedSet19, internal, instance=bb-1-1, generate
 3409,  3472,     1
*Nset, nset=_PickedSet20, internal, instance=bb-1-1
  293,  294,  295,  296,  297,  298
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*Elset, elset=_PickedSet20, internal, instance=bb-1-1, generate
 3473,  3536,     1
*Nset, nset=_PickedSet21, internal, instance=bb-1-1
  237,  238,  239,  245,  253,  254
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*Elset, elset=_PickedSet21, internal, instance=bb-1-1, generate
 3833,  3896,     1
*Nset, nset=_PickedSet22, internal, instance=bb-1-1
  240,  241,  243,  244,  247,  248
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*Elset, elset=_PickedSet22, internal, instance=bb-1-1, generate
 3217,  3280,     1
*Nset, nset=_PickedSet23, internal, instance=bb-1-1
    1,    2,    3,    4,    5,    6
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*Elset, elset=_PickedSet23, internal, instance=bb-1-1
  417,  418,  419,  420,  421,  422
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*Nset, nset=_PickedSet24, internal, instance=bb-1-1
   10,   11,   13,   14,   16,   19
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*Elset, elset=_PickedSet24, internal, instance=bb-1-1
 481, 482, 483, 484, 485, 486
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*Nset, nset=_PickedSet25, internal, instance=bb-1-1
    1,    2,    3,    4,    5,    6
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*Elset, elset=_PickedSet25, internal, instance=bb-1-1
    1,    2,    3,    4,    5,    6
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*Nset, nset=ff, instance=bb-1-1
 3468, 3469, 3470, 3510, 3511, 3512, 7735, 7736, 7737
*Elset, elset=_Surf-1_S4, internal, instance=rr-1, generate
    1,  3550,    91
*Elset, elset=_Surf-1_S6, internal, instance=rr-1
    2,   33,   93,  124,  184,  215
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*Elset, elset=_Surf-1_S3, internal, instance=rr-1
    3,    4,    6,   24,   26,   27
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*Elset, elset=_Surf-1_S5, internal, instance=rr-1
   19,   35,  110,  126,  201,  217
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*Surface, type=ELEMENT, name=Surf-1
_Surf-1_S4, S4
_Surf-1_S6, S6
_Surf-1_S3, S3
_Surf-1_S5, S5
*Elset, elset=_b_S2, internal, instance=bb-1-1
 2569, 2570, 2571, 2572, 2573, 2574
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*Surface, type=ELEMENT, name=b
_b_S2, S2
*Elset, elset=_fj_S2, internal, instance=bb-1-1
    1,    2,    3,    4,    5,    6
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*Surface, type=ELEMENT, name=fj
_fj_S2, S2
*Elset, elset=_fi_S2, internal, instance=bb-1-1
  801,  802,  803,  804,  805,  806
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*Surface, type=ELEMENT, name=fi
_fi_S2, S2
*End Assembly
**
** MATERIALS
**
*Material, name=ABS
*Density
1120.,
*Elastic
 2.3e+09, 0.394
*Material, name=DE-umat-b
*Density
960.,
*User Material, constants=9
22500.,   8.8e-08, 3.717e-11,        0.,        0.,        1.,        1.,      1.12
  0.892857,
*Material, name=DE-umat-f
*Density
960.,
*User Material, constants=9
22500.,   8.8e-08, 3.717e-11,        0.,        0.,        1.,        1.,      1.15
  0.869565,
*Material, name=DE-umat-ff
*Density
960.,
*User Material, constants=9
22500.,   8.8e-08, 3.717e-11,        0.,        0.,        1.,      1.15,        1.
  0.869565,
*Material, name=rr
*Density
1.,
*Elastic
 2.1e+14, 0.3
*Material, name=sub-ABS
*Density
1120.,
*Elastic
 1e+09, 0.394
**
** INTERACTION PROPERTIES
**
*Surface Interaction, name=one
1.,
*Friction, slip tolerance=0.005
 0.3,
*Surface Interaction, name=zero
1.,
**
** BOUNDARY CONDITIONS
**
** Name: BC-1 Type: Displacement/Rotation
*Boundary
_PickedSet8, 1, 1
_PickedSet8, 2, 2
_PickedSet8, 3, 3
** Name: BC-2 Type: Displacement/Rotation
*Boundary
ff, 1, 1
ff, 2, 2
ff, 3, 3
**
** PREDEFINED FIELDS
**
** Name: b-i1   Type: Temperature
*Initial Conditions, type=TEMPERATURE
_PickedSet20, 0.
** Name: b-i2   Type: Temperature
*Initial Conditions, type=TEMPERATURE
_PickedSet19, 0.
** Name: b-j1   Type: Temperature
*Initial Conditions, type=TEMPERATURE
_PickedSet17, 0.
** Name: b-j2   Type: Temperature
*Initial Conditions, type=TEMPERATURE
_PickedSet18, 0.
** Name: f-i1   Type: Temperature
*Initial Conditions, type=TEMPERATURE
_PickedSet22, 0.
** Name: f-i2   Type: Temperature
*Initial Conditions, type=TEMPERATURE
_PickedSet21, 0.
** Name: f-j1   Type: Temperature
*Initial Conditions, type=TEMPERATURE
_PickedSet15, 0.
** Name: f-j2   Type: Temperature
*Initial Conditions, type=TEMPERATURE
_PickedSet16, 0.
** Name: ff-i-a   Type: Temperature
*Initial Conditions, type=TEMPERATURE
_PickedSet24, 0.
** Name: ff-i-b   Type: Temperature
*Initial Conditions, type=TEMPERATURE
_PickedSet23, 0.
** Name: ff-j-a   Type: Temperature
*Initial Conditions, type=TEMPERATURE
_PickedSet13, 0.
** Name: ff-j-b   Type: Temperature
*Initial Conditions, type=TEMPERATURE
_PickedSet14, 0.
** Name: others   Type: Temperature
*Initial Conditions, type=TEMPERATURE
_PickedSet25, 0.
**
** INTERACTIONS
**
** Interaction: Int-1
*Contact Pair, interaction=zero, type=SURFACE TO SURFACE
b, Surf-1
** Interaction: Int-2
*Contact Pair, interaction=one, type=SURFACE TO SURFACE
fi, Surf-1
** Interaction: Int-3
*Contact Pair, interaction=one, type=SURFACE TO SURFACE
fj, Surf-1
** ----------------------------------------------------------------
**
** STEP: release
**
*Step, name=release, nlgeom=YES, inc=100000
*Static
0.001, 1., 1e-05, 0.015
**
** BOUNDARY CONDITIONS
**
** Name: BC-1 Type: Displacement/Rotation
*Boundary
_PickedSet8, 3, 3
**
** LOADS
**
** Name: Load-1   Type: Gravity
*Dload
, GRAV, 0.3, 0., 0., -1.
**
** INTERACTIONS
**
** Interaction: Int-1
*Model Change, type=CONTACT PAIR, remove
b, Surf-1
** Interaction: Int-2
*Model Change, type=CONTACT PAIR, remove
fi, Surf-1
** Interaction: Int-3
*Model Change, type=CONTACT PAIR, remove
fj, Surf-1
**
** OUTPUT REQUESTS
**
*Restart, write, overlay, frequency=1
**
** FIELD OUTPUT: F-Output-1
**
*Output, field, variable=PRESELECT
**
** HISTORY OUTPUT: H-Output-1
**
*Output, history, variable=PRESELECT
*End Step
** ----------------------------------------------------------------
**
** STEP: open
**
*Step, name=open, nlgeom=YES, inc=10000
*Static
0.001, 1., 1e-05, 0.03
**
** PREDEFINED FIELDS
**
** Name: ff-i-a   Type: Temperature
*Temperature
_PickedSet24, 2e+07
** Name: ff-i-b   Type: Temperature
*Temperature
_PickedSet23, 2e+07
** Name: ff-j-a   Type: Temperature
*Temperature
_PickedSet13, 2e+07
** Name: ff-j-b   Type: Temperature
*Temperature
_PickedSet14, 2e+07
**
** OUTPUT REQUESTS
**
*Restart, write, overlay, frequency=1
**
** FIELD OUTPUT: F-Output-1
**
*Output, field, variable=PRESELECT
**
** HISTORY OUTPUT: H-Output-1
**
*Output, history, variable=PRESELECT
*End Step
** ----------------------------------------------------------------
**
** STEP: pre
**
*Step, name=pre, nlgeom=YES, inc=10000
*Static
0.001, 1., 1e-05, 0.03
**
** BOUNDARY CONDITIONS
**
** Name: BC-1 Type: Displacement/Rotation
*Boundary
_PickedSet8, 3, 3, 0.09
**
** INTERACTIONS
**
** Interaction: Int-1
*Model Change, type=CONTACT PAIR, add
b, Surf-1
** Interaction: Int-2
*Model Change, type=CONTACT PAIR, add
fi, Surf-1
** Interaction: Int-3
*Model Change, type=CONTACT PAIR, add
fj, Surf-1
**
** OUTPUT REQUESTS
**
*Restart, write, overlay, frequency=1
**
** FIELD OUTPUT: F-Output-1
**
*Output, field, variable=PRESELECT
**
** HISTORY OUTPUT: H-Output-1
**
*Output, history, variable=PRESELECT
*End Step
** ----------------------------------------------------------------
**
** STEP: grasp
**
*Step, name=grasp, nlgeom=YES, inc=100000
*Dynamic,application=QUASI-STATIC,initial=NO
0.001,1.,1e-05,0.03
**
** BOUNDARY CONDITIONS
**
** Name: BC-2 Type: Displacement/Rotation
*Boundary
ff, 2, 2
ff, 3, 3
**
** PREDEFINED FIELDS
**
** Name: ff-i-b   Type: Temperature
*Temperature
_PickedSet23, 0.
** Name: ff-j-b   Type: Temperature
*Temperature
_PickedSet14, 0.
**
** OUTPUT REQUESTS
**
*Restart, write, overlay, frequency=1
**
** FIELD OUTPUT: F-Output-1
**
*Output, field, variable=PRESELECT, frequency=1
**
** HISTORY OUTPUT: H-Output-1
**
*Output, history, variable=PRESELECT, frequency=1
*End Step
** ----------------------------------------------------------------
**
** STEP: grasp-continue
**
*Step, name=grasp-continue, nlgeom=YES, inc=100000
*Dynamic,application=QUASI-STATIC,initial=NO
0.01,1.,1e-05,0.03
**
** PREDEFINED FIELDS
**
** Name: ff-i-a   Type: Temperature
*Temperature
_PickedSet24, 0.
** Name: ff-j-a   Type: Temperature
*Temperature
_PickedSet13, 0.
**
** OUTPUT REQUESTS
**
*Restart, write, overlay, frequency=1
**
** FIELD OUTPUT: F-Output-1
**
*Output, field, variable=PRESELECT, frequency=1
**
** HISTORY OUTPUT: H-Output-1
**
*Output, history, variable=PRESELECT, frequency=1
*End Step
** ----------------------------------------------------------------
**
** STEP: rest
**
*Step, name=rest, nlgeom=YES, inc=100000
*Dynamic,application=QUASI-STATIC,initial=NO
0.01,1.,1e-05,0.03
**
** BOUNDARY CONDITIONS
**
** Name: BC-1 Type: Displacement/Rotation
*Boundary, op=NEW
_PickedSet8, 1, 1
_PickedSet8, 2, 2
_PickedSet8, 3, 3, 0.09
** Name: BC-2 Type: Displacement/Rotation
*Boundary, op=NEW
ff, 1, 1
**
** OUTPUT REQUESTS
**
*Restart, write, overlay, frequency=1
**
** FIELD OUTPUT: F-Output-1
**
*Output, field, variable=PRESELECT, frequency=1
**
** HISTORY OUTPUT: H-Output-1
**
*Output, history, variable=PRESELECT, frequency=1
*End Step
** ----------------------------------------------------------------
**
** STEP: de-ff-i-ab
**
*Step, name=de-ff-i-ab, nlgeom=YES, inc=100000
*Dynamic,application=QUASI-STATIC,initial=NO
0.01,1.,1e-05,0.03
**
** PREDEFINED FIELDS
**
** Name: ff-i-a   Type: Temperature
*Temperature
_PickedSet24, 2e+07
** Name: ff-i-b   Type: Temperature
*Temperature
_PickedSet23, 2e+07
**
** OUTPUT REQUESTS
**
*Restart, write, overlay, frequency=1
**
** FIELD OUTPUT: F-Output-1
**
*Output, field, variable=PRESELECT, frequency=1
**
** HISTORY OUTPUT: H-Output-1
**
*Output, history, variable=PRESELECT, frequency=1
*End Step
** ----------------------------------------------------------------
**
** STEP: big-move
**
*Step, name=big-move, nlgeom=YES, inc=100000
*Dynamic,application=QUASI-STATIC,initial=NO
0.01,1.,1e-05,0.03
**
** PREDEFINED FIELDS
**
** Name: b-i1   Type: Temperature
*Temperature
_PickedSet20, 2.2e+07
** Name: b-i2   Type: Temperature
*Temperature
_PickedSet19, 2.2e+07
** Name: b-j1   Type: Temperature
*Temperature
_PickedSet17, 2.2e+07
** Name: b-j2   Type: Temperature
*Temperature
_PickedSet18, 2.2e+07
**
** OUTPUT REQUESTS
**
*Restart, write, overlay, frequency=1
**
** FIELD OUTPUT: F-Output-1
**
*Output, field, variable=PRESELECT, frequency=1
**
** HISTORY OUTPUT: H-Output-1
**
*Output, history, variable=PRESELECT, frequency=1
*End Step
** ----------------------------------------------------------------
**
** STEP: rest-2
**
*Step, name=rest-2, nlgeom=YES, inc=100000
*Dynamic,application=QUASI-STATIC,initial=NO
0.01,1.,1e-05,0.03
**
** PREDEFINED FIELDS
**
** Name: f-i1   Type: Temperature
*Temperature
_PickedSet22, 2.2e+06
** Name: f-i2   Type: Temperature
*Temperature
_PickedSet21, 2.2e+07
** Name: ff-i-a   Type: Temperature
*Temperature
_PickedSet24, 2.2e+07
**
** OUTPUT REQUESTS
**
*Restart, write, overlay, frequency=1
**
** FIELD OUTPUT: F-Output-1
**
*Output, field, variable=PRESELECT, frequency=1
**
** HISTORY OUTPUT: H-Output-1
**
*Output, history, variable=PRESELECT, frequency=1
*End Step
** ----------------------------------------------------------------
**
** STEP: grasp-2
**
*Step, name=grasp-2, nlgeom=YES, inc=100000
*Dynamic,application=QUASI-STATIC,initial=NO
0.001,1.,1e-05,0.03
**
** PREDEFINED FIELDS
**
** Name: ff-i-b   Type: Temperature
*Temperature
_PickedSet23, 0.
** Name: ff-j-a   Type: Temperature
*Temperature
_PickedSet13, 2.2e+07
** Name: ff-j-b   Type: Temperature
*Temperature
_PickedSet14, 2e+07
**
** OUTPUT REQUESTS
**
*Restart, write, overlay, frequency=1
**
** FIELD OUTPUT: F-Output-1
**
*Output, field, variable=PRESELECT, frequency=1
**
** HISTORY OUTPUT: H-Output-1
**
*Output, history, variable=PRESELECT, frequency=1
*End Step
** ----------------------------------------------------------------
**
** STEP: grasp-2-continue
**
*Step, name=grasp-2-continue, nlgeom=YES, inc=100000
*Dynamic,application=QUASI-STATIC,initial=NO
0.001,1.,1e-05,0.03
**
** PREDEFINED FIELDS
**
** Name: ff-i-a   Type: Temperature
*Temperature
_PickedSet24, 0.
**
** OUTPUT REQUESTS
**
*Restart, write, overlay, frequency=1
**
** FIELD OUTPUT: F-Output-1
**
*Output, field, variable=PRESELECT, frequency=1
**
** HISTORY OUTPUT: H-Output-1
**
*Output, history, variable=PRESELECT, frequency=1
*End Step
** ----------------------------------------------------------------
**
** STEP: big-back
**
*Step, name=big-back, nlgeom=YES, inc=100000
*Dynamic,application=QUASI-STATIC,initial=NO
0.01,1.,1e-05,0.03
**
** PREDEFINED FIELDS
**
** Name: b-i1   Type: Temperature
*Temperature
_PickedSet20, 0.
** Name: b-i2   Type: Temperature
*Temperature
_PickedSet19, 0.
** Name: b-j1   Type: Temperature
*Temperature
_PickedSet17, 0.
** Name: b-j2   Type: Temperature
*Temperature
_PickedSet18, 0.
** Name: f-i1   Type: Temperature
*Temperature
_PickedSet22, 0.
** Name: f-i2   Type: Temperature
*Temperature
_PickedSet21, 0.
**
** OUTPUT REQUESTS
**
*Restart, write, overlay, frequency=1
**
** FIELD OUTPUT: F-Output-1
**
*Output, field, variable=PRESELECT, frequency=1
**
** HISTORY OUTPUT: H-Output-1
**
*Output, history, variable=PRESELECT, frequency=1
*End Step
** ----------------------------------------------------------------
**
** STEP: grasp-3
**
*Step, name=grasp-3, nlgeom=YES, inc=100000
*Dynamic,application=QUASI-STATIC,initial=NO
0.01,1.,1e-05,0.03
**
** PREDEFINED FIELDS
**
** Name: ff-i-a   Type: Temperature
*Temperature
_PickedSet24, 2.2e+07
** Name: ff-i-b   Type: Temperature
*Temperature
_PickedSet23, 2e+07
** Name: ff-j-b   Type: Temperature
*Temperature
_PickedSet14, 0.
**
** OUTPUT REQUESTS
**
*Restart, write, overlay, frequency=1
**
** FIELD OUTPUT: F-Output-1
**
*Output, field, variable=PRESELECT, frequency=1
**
** HISTORY OUTPUT: H-Output-1
**
*Output, history, variable=PRESELECT, frequency=1
*End Step
** ----------------------------------------------------------------
**
** STEP: grasp-3-continue
**
*Step, name=grasp-3-continue, nlgeom=YES, inc=100000
*Dynamic,application=QUASI-STATIC,initial=NO
0.01,1.,1e-05,0.03
**
** PREDEFINED FIELDS
**
** Name: ff-j-a   Type: Temperature
*Temperature
_PickedSet13, 0.
**
** OUTPUT REQUESTS
**
*Restart, write, overlay, frequency=1
**
** FIELD OUTPUT: F-Output-1
**
*Output, field, variable=PRESELECT, frequency=1
**
** HISTORY OUTPUT: H-Output-1
**
*Output, history, variable=PRESELECT, frequency=1
*End Step
** ----------------------------------------------------------------
**
** STEP: big-move-2
**
*Step, name=big-move-2, nlgeom=YES, inc=100000
*Dynamic,application=QUASI-STATIC,initial=NO
0.01,1.,1e-05,0.03
**
** PREDEFINED FIELDS
**
** Name: b-i1   Type: Temperature
*Temperature
_PickedSet20, 2.2e+07
** Name: b-i2   Type: Temperature
*Temperature
_PickedSet19, 2.2e+07
** Name: b-j1   Type: Temperature
*Temperature
_PickedSet17, 2.2e+07
** Name: b-j2   Type: Temperature
*Temperature
_PickedSet18, 2.2e+07
**
** OUTPUT REQUESTS
**
*Restart, write, overlay, frequency=1
**
** FIELD OUTPUT: F-Output-1
**
*Output, field, variable=PRESELECT, frequency=1
**
** HISTORY OUTPUT: H-Output-1
**
*Output, history, variable=PRESELECT, frequency=1
*End Step
