*Heading
** Job name: over-all Model name: Model-1
** Generated by: Abaqus/CAE 6.10-1
*Preprint, echo=NO, model=NO, history=NO, contact=NO
**
** PARTS
**
*Part, name=Part-1
*Node
      1, 0.00200000009, 0.0154999997, -0.00400000019
      2, 0.00200000009, 0.0154999997, -0.00300000003
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*Element, type=C3D8R
 1,  14,   9, 297, 302,   1,   2, 281, 290
 2, 302, 297, 296, 303, 290, 281, 282, 289
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*Element, type=C3D8H
111,    1,  557, 2240,  290,   83,  525, 2195,  552
112,  557,  556, 2241, 2240,  525,  526, 2196, 2195
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*Nset, nset=rubber-s
  133,  134,  136,  137,  151,  154
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*Elset, elset=rubber-s
  769,  770,  771,  772,  773,  774
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*Nset, nset=rubber-f
  129,  130,  131,  132,  139,  140
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*Elset, elset=rubber-f
  641,  642,  643,  644,  645,  646
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*Nset, nset=rubber-frame
  129,  130,  131,  132,  133,  134
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*Elset, elset=rubber-frame
 1289, 1290, 1291, 1292, 1293, 1294
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*Nset, nset=frame-ii
   91,   92,   95,   98,   99,  100
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*Elset, elset=frame-ii
  369,  370,  371,  372,  373,  374
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*Nset, nset=rubber
  129,  130,  131,  132,  133,  134
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*Elset, elset=rubber
  641,  642,  643,  644,  645,  646
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*Nset, nset=rubber-ff
    1,    6,    7,    8,   13,   14
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*Elset, elset=rubber-ff
  111,  112,  113,  114,  115,  116
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*Nset, nset=frame
    1,    2,    3,    4,    5,    6
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*Elset, elset=frame
    1,    2,    3,    4,    5,    6
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*Nset, nset=_PickedSet89, internal
    3,    4,   10,   11,   27,   28
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*Elset, elset=_PickedSet89, internal
 195, 196, 197, 198, 199, 200
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** Section: Section-1
*Solid Section, elset=frame, material=ABS
,
** Section: Section-4
*Solid Section, elset=rubber-ff, material=DE-umat-ff
,
** Section: Section-4
*Solid Section, elset=_PickedSet89, material=DE-umat-ff
,
** Section: Section-3
*Solid Section, elset=rubber-f, material=DE-umat-f
,
** Section: Section-2
*Solid Section, elset=rubber-s, material=DE-umat-b
,
*End Part
**
*Part, name=Part-2
*Node
      1, 0.0299999993,  0.300000012, 0.00100000005
      2, 0.0299999993,  0.297500014, 0.00100000005
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*Element, type=C3D8R
   1,  243,  244,  365,  364,    1,    2,  123,  122
   2,  244,  245,  366,  365,    2,    3,  124,  123
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*Nset, nset=_PickedSet2, internal, generate
    1,  6050,     1
*Elset, elset=_PickedSet2, internal, generate
    1,  2880,     1
** Section: Section-5
*Solid Section, elset=_PickedSet2, material=rr
,
*End Part
**
**
** ASSEMBLY
**
*Assembly, name=Assembly
**
*Instance, name=Part-1-1, part=Part-1
       0.005,           0.,           0.
*End Instance
**
*Instance, name=Part-2-1, part=Part-2
          0.,       0.0095,      -0.0642
*End Instance
**
*Nset, nset=_PickedSet5, internal, instance=Part-1-1
  161,  162,  172,  182,  196,  197
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*Elset, elset=_PickedSet5, internal, instance=Part-1-1, generate
 641,  704,    1
*Nset, nset=_PickedSet6, internal, instance=Part-1-1
  159,  160,  163,  164,  245,  246
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*Elset, elset=_PickedSet6, internal, instance=Part-1-1, generate
 1153,  1216,     1
*Nset, nset=_PickedSet7, internal, instance=Part-1-1
  204,  205,  206,  207,  208,  209
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*Elset, elset=_PickedSet7, internal, instance=Part-1-1, generate
 769,  832,    1
*Nset, nset=_PickedSet8, internal, instance=Part-1-1
  212,  213,  214,  215,  216,  217
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*Elset, elset=_PickedSet8, internal, instance=Part-1-1, generate
 833,  896,    1
*Nset, nset=_PickedSet9, internal, instance=Part-1-1
  220,  221,  222,  223,  224,  225
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*Elset, elset=_PickedSet9, internal, instance=Part-1-1, generate
 897,  960,    1
*Nset, nset=_PickedSet10, internal, instance=Part-1-1
  228,  229,  230,  231,  232,  233
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*Elset, elset=_PickedSet10, internal, instance=Part-1-1, generate
  961,  1024,     1
*Nset, nset=_PickedSet11, internal, instance=Part-1-1
  129,  130,  141,  142,  236,  237
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*Elset, elset=_PickedSet11, internal, instance=Part-1-1, generate
 1041,  1104,     1
*Nset, nset=_PickedSet12, internal, instance=Part-1-1
  139,  140,  145,  146,  200,  201
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*Elset, elset=_PickedSet12, internal, instance=Part-1-1, generate
 705,  768,    1
*Nset, nset=_PickedSet13, internal, instance=Part-1-1
  129,  130,  131,  132,  133,  134
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*Elset, elset=_PickedSet13, internal, instance=Part-1-1
  369,  370,  371,  372,  373,  374
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*Nset, nset=_PickedSet22, internal, instance=Part-1-1
    1,    6,    7,    8,   13,   14
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*Elset, elset=_PickedSet22, internal, instance=Part-1-1
    1,    2,    3,    4,    5,    6
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*Nset, nset=_PickedSet23, internal, instance=Part-1-1
    1,    6,    7,    8,   15,   30
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*Elset, elset=_PickedSet23, internal, instance=Part-1-1, generate
 111,  170,    1
*Nset, nset=_PickedSet27, internal, instance=Part-1-1
   37,   42,   43,   44,   54,   70
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*Elset, elset=_PickedSet27, internal, instance=Part-1-1, generate
 251,  310,    1
*Nset, nset=_PickedSet33, internal, instance=Part-2-1
  122,  123,  124,  125,  126,  127
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*Elset, elset=_PickedSet33, internal, instance=Part-2-1, generate
    1,  2880,     1
*Nset, nset=Set-1, instance=Part-1-1
 1878, 1879, 1880, 1920, 1921, 1922, 3949, 3950, 3951
*Elset, elset=_frame-fff_S5, internal, instance=Part-1-1, generate
 103,  110,    1
*Elset, elset=_frame-fff_S2, internal, instance=Part-1-1, generate
 625,  640,    1
*Elset, elset=_frame-fff_S3, internal, instance=Part-1-1, generate
 243,  250,    1
*Surface, type=ELEMENT, name=frame-fff
_frame-fff_S5, S5
_frame-fff_S2, S2
_frame-fff_S3, S3
*Elset, elset=_rr_S3, internal, instance=Part-2-1, generate
    1,  2880,     1
*Surface, type=ELEMENT, name=rr
_rr_S3, S3
*Elset, elset=_rubber-ff_S2, internal, instance=Part-1-1
 111, 112, 113, 114, 115, 116
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*Surface, type=ELEMENT, name=rubber-ff
_rubber-ff_S2, S2
*End Assembly
**
** MATERIALS
**
*Material, name=ABS
*Density
1120.,
*Elastic
 2.3e+09, 0.394
*Material, name=DE-umat-b
*Density
960.,
*User Material, constants=9
22500.,   8.8e-08, 3.717e-11,        0.,        0.,        1.,        1.,      1.15
  0.869565,
*Material, name=DE-umat-f
*Density
960.,
*User Material, constants=9
22500.,   8.8e-08, 3.717e-11,        0.,        0.,        1.,        1.,       1.3
  0.769231,
*Material, name=DE-umat-ff
*Density
960.,
*User Material, constants=9
22500.,   8.8e-08, 3.717e-11,        0.,        0.,        1.,        1.,        1.
        1.,
*Material, name=rr
*Density
1.,
*Elastic
 2.1e+12, 0.2
**
** INTERACTION PROPERTIES
**
*Surface Interaction, name=e
1.,
*Friction, slip tolerance=0.005
 0.7,
*Surface Behavior, pressure-overclosure=HARD
*Surface Interaction, name=zero
1.,
*Friction, slip tolerance=0.005
 0.2,
*Surface Behavior, pressure-overclosure=HARD
**
** BOUNDARY CONDITIONS
**
** Name: BC-1 Type: Displacement/Rotation
*Boundary
Set-1, 1, 1
Set-1, 2, 2
Set-1, 3, 3
** Name: BC-2 Type: Displacement/Rotation
*Boundary
_PickedSet33, 1, 1
_PickedSet33, 2, 2
_PickedSet33, 3, 3
**
** PREDEFINED FIELDS
**
** Name: Predefined Field-9   Type: Temperature
*Initial Conditions, type=TEMPERATURE
_PickedSet13, 0.
** Name: bi1   Type: Temperature
*Initial Conditions, type=TEMPERATURE
_PickedSet7, 0.
** Name: bi2   Type: Temperature
*Initial Conditions, type=TEMPERATURE
_PickedSet8, 0.
** Name: bj1   Type: Temperature
*Initial Conditions, type=TEMPERATURE
_PickedSet10, 0.
** Name: bj2   Type: Temperature
*Initial Conditions, type=TEMPERATURE
_PickedSet9, 0.
** Name: ff-frame   Type: Temperature
*Initial Conditions, type=TEMPERATURE
_PickedSet22, 0.
** Name: ff-i1   Type: Temperature
*Initial Conditions, type=TEMPERATURE
_PickedSet23, 0.
** Name: ff-j1   Type: Temperature
*Initial Conditions, type=TEMPERATURE
_PickedSet27, 0.
** Name: fi1   Type: Temperature
*Initial Conditions, type=TEMPERATURE
_PickedSet5, 0.
** Name: fi2   Type: Temperature
*Initial Conditions, type=TEMPERATURE
_PickedSet6, 0.
** Name: fj1   Type: Temperature
*Initial Conditions, type=TEMPERATURE
_PickedSet12, 0.
** Name: fj2   Type: Temperature
*Initial Conditions, type=TEMPERATURE
_PickedSet11, 0.
**
** INTERACTIONS
**
** Interaction: Int-1
*Contact Pair, interaction=zero, type=SURFACE TO SURFACE
frame-fff, rr
** Interaction: Int-2
*Contact Pair, interaction=e, type=SURFACE TO SURFACE
rubber-ff, rr
** ----------------------------------------------------------------
**
** STEP: shrink
**
*Step, name=shrink, nlgeom=YES, inc=100000
*Static
0.001, 1., 1e-05, 0.03
**
** LOADS
**
** Name: Load-1   Type: Gravity
*Dload
, GRAV, 0.3, 0., 0., -1.
**
** INTERACTIONS
**
** Interaction: Int-1
*Model Change, type=CONTACT PAIR, remove
frame-fff, rr
** Interaction: Int-2
*Model Change, type=CONTACT PAIR, remove
rubber-ff, rr
**
** OUTPUT REQUESTS
**
*Restart, write, overlay, frequency=1
**
** FIELD OUTPUT: F-Output-1
**
*Output, field, variable=PRESELECT
**
** HISTORY OUTPUT: H-Output-1
**
*Output, history, variable=PRESELECT
*End Step
** ----------------------------------------------------------------
**
** STEP: move-down
**
*Step, name=move-down, nlgeom=YES, inc=100000
*Dynamic,application=QUASI-STATIC,initial=NO
0.001,1.,1e-05,0.03
**
** BOUNDARY CONDITIONS
**
** Name: BC-1 Type: Displacement/Rotation
*Boundary, op=NEW
Set-1, 1, 1
** Name: BC-2 Type: Displacement/Rotation
*Boundary, op=NEW
_PickedSet33, 1, 1
_PickedSet33, 2, 2
_PickedSet33, 3, 3
**
** INTERACTIONS
**
** Interaction: Int-1
*Model Change, type=CONTACT PAIR, add
frame-fff, rr
**
** OUTPUT REQUESTS
**
*Restart, write, overlay, frequency=1
**
** FIELD OUTPUT: F-Output-1
**
*Output, field, variable=PRESELECT, frequency=1
**
** HISTORY OUTPUT: H-Output-1
**
*Output, history, variable=PRESELECT, frequency=1
*End Step
** ----------------------------------------------------------------
**
** STEP: rest
**
*Step, name=rest, nlgeom=YES, inc=100000
*Static
0.001, 1., 1e-05, 0.03
**
** OUTPUT REQUESTS
**
*Restart, write, overlay, frequency=1
**
** FIELD OUTPUT: F-Output-1
**
*Output, field, variable=PRESELECT
**
** HISTORY OUTPUT: H-Output-1
**
*Output, history, variable=PRESELECT
*End Step
** ----------------------------------------------------------------
**
** STEP: ff-i1
**
*Step, name=ff-i1, nlgeom=YES, inc=100000
*Static
0.001, 1., 1e-05, 0.03
**
** PREDEFINED FIELDS
**
** Name: ff-i1   Type: Temperature
*Temperature
_PickedSet23, 1.6e+07
**
** INTERACTIONS
**
** Interaction: Int-2
*Model Change, type=CONTACT PAIR, add
rubber-ff, rr
**
** OUTPUT REQUESTS
**
*Restart, write, overlay, frequency=1
**
** FIELD OUTPUT: F-Output-1
**
*Output, field, variable=PRESELECT
**
** HISTORY OUTPUT: H-Output-1
**
*Output, history, variable=PRESELECT
*End Step
** ----------------------------------------------------------------
**
** STEP: f-i2
**
*Step, name=f-i2, nlgeom=YES, inc=100000
*Static
0.001, 1., 1e-05, 0.03
**
** PREDEFINED FIELDS
**
** Name: fi2   Type: Temperature
*Temperature
_PickedSet6, 1.6e+07
**
** OUTPUT REQUESTS
**
*Restart, write, overlay, frequency=1
**
** FIELD OUTPUT: F-Output-1
**
*Output, field, variable=PRESELECT
**
** HISTORY OUTPUT: H-Output-1
**
*Output, history, variable=PRESELECT
*End Step
** ----------------------------------------------------------------
**
** STEP: b-i1
**
*Step, name=b-i1, nlgeom=YES, inc=100000
*Static
0.001, 1., 1e-05, 0.03
**
** PREDEFINED FIELDS
**
** Name: bi1   Type: Temperature
*Temperature
_PickedSet7, 2e+07
**
** OUTPUT REQUESTS
**
*Restart, write, overlay, frequency=1
**
** FIELD OUTPUT: F-Output-1
**
*Output, field, variable=PRESELECT
**
** HISTORY OUTPUT: H-Output-1
**
*Output, history, variable=PRESELECT
*End Step
** ----------------------------------------------------------------
**
** STEP: ff-j1
**
*Step, name=ff-j1, nlgeom=YES, inc=100000
*Static
0.001, 1., 1e-05, 0.03
**
** PREDEFINED FIELDS
**
** Name: ff-j1   Type: Temperature
*Temperature
_PickedSet27, 1.6e+07
**
** OUTPUT REQUESTS
**
*Restart, write, overlay, frequency=1
**
** FIELD OUTPUT: F-Output-1
**
*Output, field, variable=PRESELECT
**
** HISTORY OUTPUT: H-Output-1
**
*Output, history, variable=PRESELECT
*End Step
** ----------------------------------------------------------------
**
** STEP: de-ff-i1
**
*Step, name=de-ff-i1, nlgeom=YES, inc=100000
*Static
0.001, 1., 1e-05, 0.03
**
** PREDEFINED FIELDS
**
** Name: ff-i1   Type: Temperature
*Temperature
_PickedSet23, 0.
**
** OUTPUT REQUESTS
**
*Restart, write, overlay, frequency=1
**
** FIELD OUTPUT: F-Output-1
**
*Output, field, variable=PRESELECT
**
** HISTORY OUTPUT: H-Output-1
**
*Output, history, variable=PRESELECT
*End Step
** ----------------------------------------------------------------
**
** STEP: de-b-i1
**
*Step, name=de-b-i1, nlgeom=YES, inc=100000
*Static
0.001, 1., 1e-05, 0.03
**
** PREDEFINED FIELDS
**
** Name: bi1   Type: Temperature
*Temperature
_PickedSet7, 0.
**
** OUTPUT REQUESTS
**
*Restart, write, overlay, frequency=1
**
** FIELD OUTPUT: F-Output-1
**
*Output, field, variable=PRESELECT
**
** HISTORY OUTPUT: H-Output-1
**
*Output, history, variable=PRESELECT
*End Step
** ----------------------------------------------------------------
**
** STEP: de-f-i2
**
*Step, name=de-f-i2, nlgeom=YES, inc=100000
*Static
0.001, 1., 1e-05, 0.03
**
** PREDEFINED FIELDS
**
** Name: fi2   Type: Temperature
*Temperature
_PickedSet6, 0.
**
** OUTPUT REQUESTS
**
*Restart, write, overlay, frequency=1
**
** FIELD OUTPUT: F-Output-1
**
*Output, field, variable=PRESELECT
**
** HISTORY OUTPUT: H-Output-1
**
*Output, history, variable=PRESELECT
*End Step
** ----------------------------------------------------------------
**
** STEP: de-ff-j1
**
*Step, name=de-ff-j1, nlgeom=YES, inc=100000
*Static
0.001, 1., 1e-05, 0.03
**
** PREDEFINED FIELDS
**
** Name: ff-j1   Type: Temperature
*Temperature
_PickedSet27, 0.
**
** OUTPUT REQUESTS
**
*Restart, write, overlay, frequency=1
**
** FIELD OUTPUT: F-Output-1
**
*Output, field, variable=PRESELECT
**
** HISTORY OUTPUT: H-Output-1
**
*Output, history, variable=PRESELECT
*End Step
** ----------------------------------------------------------------
**
** STEP: ff-i1-2
**
*Step, name=ff-i1-2, nlgeom=YES, inc=100000
*Static
0.001, 1., 1e-05, 0.03
**
** PREDEFINED FIELDS
**
** Name: ff-i1   Type: Temperature
*Temperature
_PickedSet23, 1.6e+07
**
** OUTPUT REQUESTS
**
*Restart, write, overlay, frequency=1
**
** FIELD OUTPUT: F-Output-1
**
*Output, field, variable=PRESELECT
**
** HISTORY OUTPUT: H-Output-1
**
*Output, history, variable=PRESELECT
*End Step
** ----------------------------------------------------------------
**
** STEP: f-i2-2
**
*Step, name=f-i2-2, nlgeom=YES, inc=100000
*Static
0.001, 1., 1e-05, 0.03
**
** PREDEFINED FIELDS
**
** Name: fi2   Type: Temperature
*Temperature
_PickedSet6, 1.6e+07
**
** OUTPUT REQUESTS
**
*Restart, write, overlay, frequency=1
**
** FIELD OUTPUT: F-Output-1
**
*Output, field, variable=PRESELECT
**
** HISTORY OUTPUT: H-Output-1
**
*Output, history, variable=PRESELECT
*End Step
** ----------------------------------------------------------------
**
** STEP: b-i1-2
**
*Step, name=b-i1-2, nlgeom=YES, inc=100000
*Static
0.001, 1., 1e-05, 0.03
**
** PREDEFINED FIELDS
**
** Name: bi1   Type: Temperature
*Temperature
_PickedSet7, 2e+07
**
** OUTPUT REQUESTS
**
*Restart, write, overlay, frequency=1
**
** FIELD OUTPUT: F-Output-1
**
*Output, field, variable=PRESELECT
**
** HISTORY OUTPUT: H-Output-1
**
*Output, history, variable=PRESELECT
*End Step
** ----------------------------------------------------------------
**
** STEP: ff-j1-2
**
*Step, name=ff-j1-2, nlgeom=YES, inc=100000
*Static
0.001, 1., 1e-05, 0.03
**
** PREDEFINED FIELDS
**
** Name: ff-j1   Type: Temperature
*Temperature
_PickedSet27, 1.6e+07
**
** OUTPUT REQUESTS
**
*Restart, write, overlay, frequency=1
**
** FIELD OUTPUT: F-Output-1
**
*Output, field, variable=PRESELECT
**
** HISTORY OUTPUT: H-Output-1
**
*Output, history, variable=PRESELECT
*End Step
** ----------------------------------------------------------------
**
** STEP: de-ff-i1-2
**
*Step, name=de-ff-i1-2, nlgeom=YES, inc=100000
*Static
0.001, 1., 1e-05, 0.03
**
** PREDEFINED FIELDS
**
** Name: ff-i1   Type: Temperature
*Temperature
_PickedSet23, 0.
**
** OUTPUT REQUESTS
**
*Restart, write, overlay, frequency=1
**
** FIELD OUTPUT: F-Output-1
**
*Output, field, variable=PRESELECT
**
** HISTORY OUTPUT: H-Output-1
**
*Output, history, variable=PRESELECT
*End Step
** ----------------------------------------------------------------
**
** STEP: de-b-i1-2
**
*Step, name=de-b-i1-2, nlgeom=YES, inc=100000
*Static
0.001, 1., 1e-05, 0.03
**
** PREDEFINED FIELDS
**
** Name: bi1   Type: Temperature
*Temperature
_PickedSet7, 0.
**
** OUTPUT REQUESTS
**
*Restart, write, overlay, frequency=1
**
** FIELD OUTPUT: F-Output-1
**
*Output, field, variable=PRESELECT
**
** HISTORY OUTPUT: H-Output-1
**
*Output, history, variable=PRESELECT
*End Step
** ----------------------------------------------------------------
**
** STEP: de-f-i2-2
**
*Step, name=de-f-i2-2, nlgeom=YES, inc=100000
*Static
0.001, 1., 1e-05, 0.03
**
** PREDEFINED FIELDS
**
** Name: fi2   Type: Temperature
*Temperature
_PickedSet6, 0.
**
** OUTPUT REQUESTS
**
*Restart, write, overlay, frequency=1
**
** FIELD OUTPUT: F-Output-1
**
*Output, field, variable=PRESELECT
**
** HISTORY OUTPUT: H-Output-1
**
*Output, history, variable=PRESELECT
*End Step
** ----------------------------------------------------------------
**
** STEP: de-ff-j1-2
**
*Step, name=de-ff-j1-2, nlgeom=YES, inc=100000
*Static
0.001, 1., 1e-05, 0.03
**
** PREDEFINED FIELDS
**
** Name: ff-j1   Type: Temperature
*Temperature
_PickedSet27, 0.
**
** OUTPUT REQUESTS
**
*Restart, write, overlay, frequency=1
**
** FIELD OUTPUT: F-Output-1
**
*Output, field, variable=PRESELECT
**
** HISTORY OUTPUT: H-Output-1
**
*Output, history, variable=PRESELECT
*End Step
