*Heading
** Job name: DEWalker Model name: DEWalker
** Generated by: Abaqus/CAE 6.13-1
*Preprint, echo=NO, model=NO, history=NO, contact=NO
**
** PARTS
**
*Part, name=Beam
*End Part
**
*Part, name=Ground
*End Part
**
*Part, name=Leg
*End Part
**
*Part, name=Wheel
*End Part
**
*Part, name=part1
*End Part
**
**
** ASSEMBLY
**
*Assembly, name=Assembly
**
*Instance, name=part1-1, part=part1
*Node
      1, 0.0149999997,  0.104999997,           0.
      2, 0.0149999997,  0.100000001,           0.
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*Element, type=C3D8H
 1,    8,  183, 2361,  197,    1,  154, 2325,  179
 2,  183,  182, 2362, 2361,  154,  155, 2326, 2325
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*Nset, nset=_PickedSet12, internal
    1,    2,    3,    4,    5,    6
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*Elset, elset=_PickedSet12, internal
    1,    2,    3,    4,    5,    6
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*Nset, nset=_PickedSet13, internal
    2,    3,    5,    6,    9,   10
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*Elset, elset=_PickedSet13, internal
   51,   52,   53,   54,   55,   56
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*Nset, nset=Frame
    5,    6,    7,    8,    9,   10
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*Elset, elset=Frame
  901,  902,  903,  904,  905,  906
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** Section: de-section
*Solid Section, elset=_PickedSet12, material=de
,
** Section: de-section
*Solid Section, elset=_PickedSet13, material=de
,
** Section: frame-section
*Solid Section, elset=Frame, material=frame
,
*End Instance
**
*Instance, name=Leg-1, part=Leg
        0.01,       -0.002,         0.02
        0.01,       -0.002,         0.02,         0.01,        0.998,         0.02,          90.
*Node
      1, 0.0179999992,           0.,           0.
      2, 0.0179999992,           0., 0.00999999978
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*Element, type=C3D8R
 1,   8,  45, 124,  60,   1,  13,  79,  40
 2,  45,  44, 125, 124,  13,  14,  80,  79
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*Nset, nset=Leg, generate
   1,  168,    1
*Elset, elset=Leg, generate
  1,  66,   1
** Section: frame-section
*Solid Section, elset=Leg, material=frame
,
*End Instance
**
*Instance, name=Leg-1-lin-2-1, part=Leg
        0.01,        0.105,         0.02
        0.01,        0.105,         0.02,         0.01,        1.105,         0.02,          90.
*Node
      1, 0.0179999992,           0.,           0.
      2, 0.0179999992,           0., 0.00999999978
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*Element, type=C3D8R
 1,   8,  45, 124,  60,   1,  13,  79,  40
 2,  45,  44, 125, 124,  13,  14,  80,  79
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*Nset, nset=Leg, generate
   1,  168,    1
*Elset, elset=Leg, generate
  1,  66,   1
** Section: frame-section
*Solid Section, elset=Leg, material=frame
,
*End Instance
**
*Instance, name=Beam-1, part=Beam
        0.01,       -0.002,         0.12
        0.01,       -0.002,         0.12,         0.01,        0.998,         0.12,          90.
*Node
      1,           0.,           0.,           0.
      2, 0.00999999978,           0.,           0.
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*Element, type=B31
 1,  1,  2
 2,  2,  3
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*Nset, nset=Set-1, generate
  1,  11,   1
*Elset, elset=Set-1, generate
  1,  10,   1
** Section: BeamSection  Profile: Profile-1
*Beam Section, elset=Set-1, material=frame, temperature=GRADIENTS, section=CIRC
0.001
0.,0.,-1.
*End Instance
**
*Instance, name=Beam-1-lin-2-1, part=Beam
        0.02,       -0.002,         0.12
        0.02,       -0.002,         0.12,         0.02,        0.998,         0.12,          90.
*Node
      1,           0.,           0.,           0.
      2, 0.00999999978,           0.,           0.
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*Element, type=B31
 1,  1,  2
 2,  2,  3
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*Nset, nset=Set-1, generate
  1,  11,   1
*Elset, elset=Set-1, generate
  1,  10,   1
** Section: BeamSection  Profile: Profile-1
*Beam Section, elset=Set-1, material=frame, temperature=GRADIENTS, section=CIRC
0.001
0.,0.,-1.
*End Instance
**
*Instance, name=Beam-1-lin-2-1-1, part=Beam
        0.02,        0.107,         0.12
        0.02,        0.107,         0.12,         0.02,        1.107,         0.12,          90.
*Node
      1,           0.,           0.,           0.
      2, 0.00999999978,           0.,           0.
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*Element, type=B31
 1,  1,  2
 2,  2,  3
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*Nset, nset=Set-1, generate
  1,  11,   1
*Elset, elset=Set-1, generate
  1,  10,   1
** Section: BeamSection  Profile: Profile-1
*Beam Section, elset=Set-1, material=frame, temperature=GRADIENTS, section=CIRC
0.001
0.,0.,-1.
*End Instance
**
*Instance, name=Beam-1-lin-2-1-lin-2-1, part=Beam
        0.01,        0.107,         0.12
        0.01,        0.107,         0.12,         0.01,        1.107,         0.12,          90.
*Node
      1,           0.,           0.,           0.
      2, 0.00999999978,           0.,           0.
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*Element, type=B31
 1,  1,  2
 2,  2,  3
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*Nset, nset=Set-1, generate
  1,  11,   1
*Elset, elset=Set-1, generate
  1,  10,   1
** Section: BeamSection  Profile: Profile-1
*Beam Section, elset=Set-1, material=frame, temperature=GRADIENTS, section=CIRC
0.001
0.,0.,-1.
*End Instance
**
*Instance, name=Wheel-1, part=Wheel
        0.01,       -0.002,         0.12
        0.01,       -0.002,         0.12,         0.01,        0.998,         0.12,          90.
*Node
      1, 0.0095949294, 0.00281732553,           0.
      2, 0.0084125353, 0.00540640811,           0.
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*Element, type=C3D8R
  1, 122, 121,  80,  79,  58,  57,  16,  15
  2,  78,  89, 122,  79,  14,  25,  58,  15
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*Nset, nset=Wheel, generate
   1,  320,    1
*Elset, elset=Wheel, generate
   1,  208,    1
** Section: frame-section
*Solid Section, elset=Wheel, material=frame
,
*End Instance
**
*Instance, name=Wheel-1-lin-2-1, part=Wheel
        0.01,        0.107,         0.12
        0.01,        0.107,         0.12,         0.01,        1.107,         0.12,          90.
*Node
      1, 0.0095949294, 0.00281732553,           0.
      2, 0.0084125353, 0.00540640811,           0.
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*Element, type=C3D8R
  1, 122, 121,  80,  79,  58,  57,  16,  15
  2,  78,  89, 122,  79,  14,  25,  58,  15
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*Nset, nset=Wheel, generate
   1,  320,    1
*Elset, elset=Wheel, generate
   1,  208,    1
** Section: frame-section
*Solid Section, elset=Wheel, material=frame
,
*End Instance
**
*Instance, name=Ground-1, part=Ground
      0.2025,       -0.107,         0.13
      0.2025,       -0.107,         0.13,       0.2025,       -0.107,         1.13,          90.
*Node
      1,  0.600000024,  0.200000003, 0.00499999989
      2,  0.600000024,  0.196875006, 0.00499999989
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*Element, type=C3D8R
   1,   28,   29,   38,   37,    1,    2,   11,   10
   2,   29,   30,   39,   38,    2,    3,   12,   11
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*Nset, nset=Ground, generate
    1,  5427,     1
*Elset, elset=Ground, generate
    1,  3200,     1
** Section: Ground
*Solid Section, elset=Ground, material=Ground
,
*End Instance
**
*Node
      1, 0.00999999978, -0.00200000009, 0.0199999996
*Node
      2, 0.00999999978,  0.107000001, 0.0199999996
*Node
      3, 0.00999999978, -0.00200000009, 0.0700000003
*Node
      4, 0.00999999978,  0.107000001, 0.0700000003
*Element, type=CONN3D2
1, 1, 3
*Connector Section, elset=Wire-1-Set-2
Beam,
*Element, type=CONN3D2
2, 2, 4
*Connector Section, elset=Wire-2-Set-2
Beam,
*Nset, nset=Beam-1, instance=Beam-1, generate
  1,  11,   1
*Nset, nset=Beam-1, instance=Beam-1-lin-2-1, generate
  1,  11,   1
*Nset, nset=Beam-1, instance=Wheel-1, generate
   1,  320,    1
*Elset, elset=Beam-1, instance=Beam-1, generate
  1,  10,   1
*Elset, elset=Beam-1, instance=Beam-1-lin-2-1, generate
  1,  10,   1
*Elset, elset=Beam-1, instance=Wheel-1, generate
   1,  208,    1
*Nset, nset=Beam-2, instance=Beam-1-lin-2-1-1, generate
  1,  11,   1
*Nset, nset=Beam-2, instance=Wheel-1-lin-2-1, generate
   1,  320,    1
*Nset, nset=Beam-2, instance=Beam-1-lin-2-1-lin-2-1, generate
  1,  11,   1
*Elset, elset=Beam-2, instance=Beam-1-lin-2-1-1, generate
  1,  10,   1
*Elset, elset=Beam-2, instance=Wheel-1-lin-2-1, generate
   1,  208,    1
*Elset, elset=Beam-2, instance=Beam-1-lin-2-1-lin-2-1, generate
  1,  10,   1
*Nset, nset=Leg-1, instance=Leg-1
   1,   2,   3,   4,   5,   6
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*Elset, elset=Leg-1, instance=Leg-1, generate
  1,  60,   1
*Nset, nset=Leg-2, instance=Leg-1-lin-2-1
   1,   2,   3,   4,   5,   6
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*Elset, elset=Leg-2, instance=Leg-1-lin-2-1, generate
  1,  60,   1
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*Nset, nset=Set-13, instance=part1-1
   44,   46,   48,   49,   71,   72
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*Elset, elset=Set-13, instance=part1-1
  951,  953,  955,  957,  959,  961
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*Nset, nset=Set-14, instance=part1-1
    1,    2,    5,    8,    9,   12
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*Elset, elset=Set-14, instance=part1-1
    1,    2,    3,    4,    5,   51
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*Nset, nset=Set-15, instance=part1-1
 44,
*Nset, nset=Set-16, instance=part1-1
    2,    3,    5,    6,    9,   10
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*Elset, elset=Set-16, instance=part1-1
    5,   10,   15,   20,   25,   30
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*Nset, nset=Set-27, instance=Ground-1
    1,    2,    3,    4,    5,    6
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*Elset, elset=Wire-1-Set-2
 1,
*Nset, nset=Wire-2-Set-2
 2, 4
*Elset, elset=Wire-2-Set-2
 2,
*Nset, nset=b_Set-28, instance=Ground-1, generate
    1,  5427,     1
*Elset, elset=b_Set-28, instance=Ground-1, generate
    1,  3200,     1
*Nset, nset=_PickedSet163, internal
 1,
*Nset, nset=_PickedSet165, internal
 2,
*Nset, nset=_PickedSet179, internal
 3,
*Nset, nset=_PickedSet181, internal
 4,
*Elset, elset=_Master-Surf-1_S1, internal, instance=part1-1
 1011, 1012, 1013, 1014, 1015, 1016
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*Elset, elset=_Master-Surf-1_S6, internal, instance=part1-1, generate
 1071,  1116,     5
*Elset, elset=_Master-Surf-1_S4, internal, instance=part1-1, generate
 2145,  2190,     5
*Surface, type=ELEMENT, name=Master-Surf-1
_Master-Surf-1_S1, S1
_Master-Surf-1_S6, S6
_Master-Surf-1_S4, S4
*Elset, elset=_Master-Surf-2_S4, internal, instance=part1-1, generate
 4630,  4675,     5
*Elset, elset=_Master-Surf-2_S2, internal, instance=part1-1
 1201, 1202, 1203, 1204, 1205, 1206
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*Elset, elset=_Master-Surf-2_S6, internal, instance=part1-1, generate
  1,  46,   5
*Surface, type=ELEMENT, name=Master-Surf-2
_Master-Surf-2_S4, S4
_Master-Surf-2_S2, S2
_Master-Surf-2_S6, S6
*Elset, elset=_Slave-Surf-1_S6, internal, instance=Leg-1, generate
 61,  66,   1
*Surface, type=ELEMENT, name=Slave-Surf-1
_Slave-Surf-1_S6, S6
*Elset, elset=_Slave-Surf-2_S4, internal, instance=Leg-1-lin-2-1, generate
 61,  66,   1
*Surface, type=ELEMENT, name=Slave-Surf-2
_Slave-Surf-2_S4, S4
*Elset, elset=_m_Surf-5_S5, internal, instance=Ground-1
    9,   10,   11,   12,   13,   14
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*Surface, type=ELEMENT, name=m_Surf-5
_m_Surf-5_S5, S5
*Elset, elset=_s_Surf-5_S5, internal, instance=Wheel-1
   1,  11,  16,  19,  30,  39
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*Elset, elset=_s_Surf-5_S6, internal, instance=Wheel-1
   2,   3,  54,  55, 106, 107, 158, 159
*Elset, elset=_s_Surf-5_S4, internal, instance=Wheel-1
  10,  18,  20,  21,  24,  26
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*Elset, elset=_s_Surf-5_S3, internal, instance=Wheel-1
  23,  25,  34,  36,  75,  77,  86,  88, 127, 129, 138, 140, 179, 181, 190, 192
*Elset, elset=_s_Surf-5_S1, internal, instance=Wheel-1, generate
 157,  208,    1
*Elset, elset=_s_Surf-5_S2, internal, instance=Wheel-1, generate
  1,  52,   1
*Surface, type=ELEMENT, name=s_Surf-5
_s_Surf-5_S5, S5
_s_Surf-5_S6, S6
_s_Surf-5_S4, S4
_s_Surf-5_S2, S2
_s_Surf-5_S3, S3
_s_Surf-5_S1, S1
*Elset, elset=_s_Surf-7_S5, internal, instance=Wheel-1-lin-2-1
   1,  11,  16,  19,  30,  39
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*Elset, elset=_s_Surf-7_S6, internal, instance=Wheel-1-lin-2-1
   2,   3,  54,  55, 106, 107, 158, 159
*Elset, elset=_s_Surf-7_S4, internal, instance=Wheel-1-lin-2-1
  10,  18,  20,  21,  24,  26
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*Elset, elset=_s_Surf-7_S3, internal, instance=Wheel-1-lin-2-1
  23,  25,  34,  36,  75,  77,  86,  88, 127, 129, 138, 140, 179, 181, 190, 192
*Elset, elset=_s_Surf-7_S1, internal, instance=Wheel-1-lin-2-1, generate
 157,  208,    1
*Elset, elset=_s_Surf-7_S2, internal, instance=Wheel-1-lin-2-1, generate
  1,  52,   1
*Surface, type=ELEMENT, name=s_Surf-7
_s_Surf-7_S5, S5
_s_Surf-7_S6, S6
_s_Surf-7_S4, S4
_s_Surf-7_S2, S2
_s_Surf-7_S3, S3
_s_Surf-7_S1, S1
** Constraint: Constraint-1
*Tie, name=Constraint-1, adjust=yes
Slave-Surf-1, Master-Surf-1
** Constraint: Constraint-2
*Tie, name=Constraint-2, adjust=yes
Slave-Surf-2, Master-Surf-2
** Constraint: Constraint-3
*Rigid Body, ref node=_PickedSet163, elset=Leg-1
** Constraint: Constraint-4
*Rigid Body, ref node=_PickedSet165, elset=Leg-2
** Constraint: Constraint-5
*Rigid Body, ref node=_PickedSet179, elset=Beam-1
** Constraint: Constraint-6
*Rigid Body, ref node=_PickedSet181, elset=Beam-2
*End Assembly
**
** MATERIALS
**
*Material, name=Ground
*Density
7800.,
*Elastic
 2.1e+11, 0.3
*Material, name=de
*Density
960.,
*User Material, constants=9
45000.,  8.8e-08, 3.72e-11,       0.,       0.,       1.,       1.,     1.05
 0.952381,
*Material, name=frame
*Density
1120.,
*Elastic
 4.6e+07, 0.3
**
** INTERACTION PROPERTIES
**
*Surface Interaction, name=IntProp-1
1.,
*Friction, slip tolerance=0.005
 0.1,
*Surface Behavior, pressure-overclosure=HARD
*Surface Interaction, name=IntProp-2
1.,
*Friction, slip tolerance=0.005
5.,
*Surface Behavior, pressure-overclosure=HARD
*Surface Interaction, name=_Int-1-Prop
1.,
*Friction, slip tolerance=0.005
 0.1,
*Surface Behavior, pressure-overclosure=HARD
*Surface Interaction, name=_Int-2-Prop
1.,
*Friction, slip tolerance=0.005
5.,
*Surface Behavior, pressure-overclosure=HARD
**
** BOUNDARY CONDITIONS
**
** Name: Fix-Ground Type: Displacement/Rotation
*Boundary
Set-27, 1, 1
Set-27, 2, 2
Set-27, 3, 3
Set-27, 4, 4
Set-27, 5, 5
Set-27, 6, 6
** Name: Fix-Z Type: Displacement/Rotation
*Boundary
Set-15, 3, 3
** Name: Sym-X Type: Displacement/Rotation
*Boundary
Set-14, 1, 1
** Name: Sym-Y Type: Displacement/Rotation
*Boundary
Set-13, 2, 2
**
** PREDEFINED FIELDS
**
** Name: Predefined Field-1   Type: Temperature
*Initial Conditions, type=TEMPERATURE
Set-16, 0.
**
** INTERACTIONS
**
** Interaction: Int-1
*Contact Pair, interaction=_Int-1-Prop, type=SURFACE TO SURFACE
m_Surf-5, s_Surf-5
** Interaction: Int-2
*Contact Pair, interaction=_Int-2-Prop, type=SURFACE TO SURFACE
m_Surf-5, s_Surf-7
** ----------------------------------------------------------------
**
** STEP: prestretch
**
*Step, name=prestretch, nlgeom=YES, inc=1000000
*Static
0.01, 1., 1e-05, 0.2
**
** INTERACTIONS
**
** Interaction: Int-1
*Model Change, type=CONTACT PAIR, remove
m_Surf-5, s_Surf-5
** Interaction: Int-2
*Model Change, type=CONTACT PAIR, remove
m_Surf-5, s_Surf-7
**
** OUTPUT REQUESTS
**
*Restart, write, overlay, frequency=1
*Print, solve=NO
**
** FIELD OUTPUT: F-Output-1
**
*Output, field, variable=PRESELECT
**
** HISTORY OUTPUT: H-Output-1
**
*Output, history, variable=PRESELECT
*End Step
** ----------------------------------------------------------------
**
** STEP: Disp-Z
**
*Step, name=Disp-Z, nlgeom=YES, inc=1000
*Static
0.001, 1., 1e-05, 1.
**
** BOUNDARY CONDITIONS
**
** Name: Fix-Z Type: Displacement/Rotation
*Boundary
Set-15, 3, 3, 0.037
**
** INTERACTIONS
**
** Interaction: Int-1
*Model Change, type=CONTACT PAIR, add
m_Surf-5, s_Surf-5
** Interaction: Int-2
*Model Change, type=CONTACT PAIR, add
m_Surf-5, s_Surf-7
**
** OUTPUT REQUESTS
**
*Restart, write, overlay, frequency=1
*Print, solve=YES
**
** FIELD OUTPUT: F-Output-1
**
*Output, field, variable=PRESELECT
**
** HISTORY OUTPUT: H-Output-1
**
*Output, history, variable=PRESELECT
*End Step
** ----------------------------------------------------------------
**
** STEP: Gravity
**
*Step, name=Gravity, nlgeom=YES, inc=1000
*Dynamic,application=QUASI-STATIC,initial=NO
0.001,1.,1e-05
**
** BOUNDARY CONDITIONS
**
** Name: Fix-Ground Type: Displacement/Rotation
*Boundary, op=NEW
Set-27, 1, 1
Set-27, 2, 2
Set-27, 3, 3
Set-27, 4, 4
Set-27, 5, 5
Set-27, 6, 6
** Name: Fix-Z Type: Displacement/Rotation
*Boundary, op=NEW
** Name: Sym-X Type: Displacement/Rotation
*Boundary, op=NEW
Set-14, 1, 1
** Name: Sym-Y Type: Displacement/Rotation
*Boundary, op=NEW
**
** LOADS
**
** Name: Load-1   Type: Gravity
*Dload
, GRAV, 0.3, 0., 0., 1.
**
** OUTPUT REQUESTS
**
*Restart, write, overlay, frequency=1
**
** FIELD OUTPUT: F-Output-1
**
*Output, field, variable=PRESELECT, frequency=1
**
** HISTORY OUTPUT: H-Output-1
**
*Output, history, variable=PRESELECT, frequency=1
*End Step
** ----------------------------------------------------------------
**
** STEP: Voltage
**
*Step, name=Voltage, nlgeom=YES, inc=1000
*Dynamic
0.001,1.,1e-05
**
** PREDEFINED FIELDS
**
** Name: Predefined Field-1   Type: Temperature
*Temperature
Set-16, 2e+07
**
** OUTPUT REQUESTS
**
*Restart, write, frequency=0
**
** FIELD OUTPUT: F-Output-1
**
*Output, field, variable=PRESELECT, frequency=1
**
** HISTORY OUTPUT: H-Output-1
**
*Output, history, variable=PRESELECT, frequency=1
*End Step
** ----------------------------------------------------------------
**
** STEP: Gravity-2
**
*Step, name=Gravity-2, nlgeom=YES, inc=1000
*Dynamic,application=QUASI-STATIC,initial=NO
0.001,1.,1e-05
**
** INTERACTIONS
**
** Interaction: Int-1
*Change Friction, interaction=_Int-1-Prop
*Friction, slip tolerance=0.005
5.,
** Interaction: Int-2
*Change Friction, interaction=_Int-2-Prop
*Friction, slip tolerance=0.005
 0.1,
**
** OUTPUT REQUESTS
**
*Restart, write, frequency=0
**
** FIELD OUTPUT: F-Output-1
**
*Output, field, variable=PRESELECT, frequency=1
**
** HISTORY OUTPUT: H-Output-1
**
*Output, history, variable=PRESELECT, frequency=1
*End Step
** ----------------------------------------------------------------
**
** STEP: CutVoltage
**
*Step, name=CutVoltage, nlgeom=YES, inc=1000
*Dynamic,application=QUASI-STATIC,initial=NO
0.001,1.,1e-05
**
** PREDEFINED FIELDS
**
** Name: Predefined Field-1   Type: Temperature
*Temperature
Set-16, 0.
**
** OUTPUT REQUESTS
**
*Restart, write, frequency=0
**
** FIELD OUTPUT: F-Output-1
**
*Output, field, variable=PRESELECT, frequency=1
**
** HISTORY OUTPUT: H-Output-1
**
*Output, history, variable=PRESELECT, frequency=1
*End Step
